**
** Heading +++++++++++++++++++++++++++++++++++++++++++++++++
**
*Heading
Hash: f6OzmRQP, Date: 12/20/2024, Unit system: MM_TON_S_C
**
** Nodes +++++++++++++++++++++++++++++++++++++++++++++++++++
**
*Node
1, 2.00000000E+002, 0.00000000E+000, 0.00000000E+000
2, 2.00000000E+002, 0.00000000E+000, 1.00000000E+001
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**
** Elements ++++++++++++++++++++++++++++++++++++++++++++++++
**
*Element, Type=C3D8, Elset=beam
1, 261, 1138, 1306, 1059, 8, 348, 1297, 340
2, 1138, 1217, 1866, 1306, 348, 347, 1298, 1297
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**
** Node sets +++++++++++++++++++++++++++++++++++++++++++++++
**
*Nset, Nset=Internal_Selection-1_Fixed-1
3, 4, 6, 8, 91, 92
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*Nset, Nset=Internal-1_Internal_Selection-1_Surface_Traction-1
1, 2, 5, 7, 9, 10
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*Nset, Nset=fixed-end
3, 4, 6, 8, 91, 92
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*Nset, Nset=load-end
1, 2, 5, 7, 9, 10
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**
** Element sets ++++++++++++++++++++++++++++++++++++++++++++
**
*Elset, Elset=Internal-1_Internal_Selection-1_Surface_Traction-1_S1
1265, 1266, 1267, 1268, 1269, 1270, 1271, 1272, 1273, 1274, 1275, 1276, 1277, 1278, 1279, 1280
*Elset, Elset=Internal_Selection-1_steel
beam
**
** Surfaces ++++++++++++++++++++++++++++++++++++++++++++++++
**
*Surface, Name=Internal_Selection-1_Surface_Traction-1, Type=Element
Internal-1_Internal_Selection-1_Surface_Traction-1_S1, S1
**
** Physical constants ++++++++++++++++++++++++++++++++++++++
**
**
** Coordinate systems ++++++++++++++++++++++++++++++++++++++
**
**
** Materials +++++++++++++++++++++++++++++++++++++++++++++++
**
*Material, Name=linear-elastic
*Elastic
200000, 0.3
** Name: elastic-plastic: Deactivated
**
** Sections ++++++++++++++++++++++++++++++++++++++++++++++++
**
*Solid section, Elset=Internal_Selection-1_steel, Material=linear-elastic
**
** Pre-tension sections ++++++++++++++++++++++++++++++++++++
**
**
** Constraints +++++++++++++++++++++++++++++++++++++++++++++
**
**
** Surface interactions ++++++++++++++++++++++++++++++++++++
**
**
** Contact pairs +++++++++++++++++++++++++++++++++++++++++++
**
**
** Amplitudes ++++++++++++++++++++++++++++++++++++++++++++++
**
**
** Initial conditions ++++++++++++++++++++++++++++++++++++++
**
**
** Steps +++++++++++++++++++++++++++++++++++++++++++++++++++
**
**
** static ++++++++++++++++++++++++++++++++++++++++++++++++++
**
*Step
*Static, Solver=Pardiso
**
** Controls ++++++++++++++++++++++++++++++++++++++++++++++++
**
**
** Output frequency ++++++++++++++++++++++++++++++++++++++++
**
*Output, Frequency=1
**
** Boundary conditions +++++++++++++++++++++++++++++++++++++
**
*Boundary, op=New
** Name: fixed
*Boundary
fixed-end, 1, 6, 0
**
** Loads +++++++++++++++++++++++++++++++++++++++++++++++++++
**
*Cload, op=New
*Dload, op=New
** Name: load
*Cload
7, 2, -4.4375
343, 2, -8.875
1385, 2, -17.75
260, 2, -8.875
344, 2, -8.875
1945, 2, -17.75
345, 2, -8.875
1865, 2, -17.75
1, 2, -4.4375
9, 2, -8.875
1465, 2, -17.75
259, 2, -8.875
2025, 2, -17.75
1785, 2, -17.75
10, 2, -8.875
1545, 2, -17.75
258, 2, -8.875
1625, 2, -17.75
1705, 2, -17.75
11, 2, -8.875
175, 2, -8.875
5, 2, -4.4375
174, 2, -8.875
173, 2, -8.875
2, 2, -4.4375
**
** Defined fields ++++++++++++++++++++++++++++++++++++++++++
**
**
** History outputs +++++++++++++++++++++++++++++++++++++++++
**
**
** Field outputs +++++++++++++++++++++++++++++++++++++++++++
**
*Node file
RF, U
*El file
S, E, NOE
**
** End step ++++++++++++++++++++++++++++++++++++++++++++++++
**
*End step
**
** modal +++++++++++++++++++++++++++++++++++++++++++++++++++
**
** Name: modal: Deactivated
** Name: CaeModel.FrequencyStep: Deactivated
**
** Boundary conditions +++++++++++++++++++++++++++++++++++++
**
** Name: Fixed-1: Deactivated
**
** Loads +++++++++++++++++++++++++++++++++++++++++++++++++++
**
**
** Defined fields ++++++++++++++++++++++++++++++++++++++++++
**
**
** History outputs +++++++++++++++++++++++++++++++++++++++++
**
**
** Field outputs +++++++++++++++++++++++++++++++++++++++++++
**
** Name: NF-Output-1: Deactivated
** Name: EF-Output-1: Deactivated
**
** End step ++++++++++++++++++++++++++++++++++++++++++++++++
**
** Name: modal: Deactivated
